// COMSOL Multiphysics 6.1.0.252 model "2D-SOC0.5.mph"
// 钒氧化还原液流电池
// 这个钒液流电池二维示例演示如何将离子交换膜的三次电流分布模型与液流电池的两个不同自由电解质室的三次电流分布模型进行耦合。
// 离子交换膜 边界节点指定一个边界条件，其中离子通量是连续的，但电解质电位不连续，并用唐南平衡进行描述。
// 该边界条件通常用于同时包含自由电解质和离子交换膜的电化学电池，例如用于透析问题。
// Outline of the model tree

Parameters
  H_cell = 0.035[m]
  wCell = 0.0285[m]
  L_e = 0.004[m]
  L_m = 203e-6[m]
  DCr2 = 1.07E-09[m^2/s]
  DCr3 = 1.07E-09[m^2/s]
  DFe2 = 1.29408E-09[m^2/s]
  DFe3 = 1.08639E-09[m^2/s]
  DH = 8.68E-08[m^2/s]
  DCl = 4.66E-08[m^2/s]
  v = 30[ml/min]/(wCell*L_e)
  T = 338.15[K]
  sigma_e = 2500[S/m]
  epsilon = 0.93
  a = 65e4[m^2/m^3]
  E0_pos = 0.77[V]
  k_pos0 = 9.8e-7[m/s]
  alpha_pos = 0.5
  E0_neg = -0.41[V]
  k_neg0 = 2.7e-7[m/s]
  alpha_neg = 0.5
  cHm = 1.99[mol/l]
  cCr2_0 = SOC*1200[mol/m^3]
  cCr3_0 = 1400[mol/m^3]-SOC*1200[mol/m^3]
  cFe2_0 = (1-SOC)*c_pos_total
  cFe3_0 = SOC*c_pos_total
  cH_0_neg = 2500[mol/m^3]
  cH_0_pos = 2500[mol/m^3]
  cCl_0_neg = cH_0_neg+cCr2_0*2+cCr3_0*3
  cCl_0_pos = cH_0_pos+cFe2_0*2+cFe3_0*3
  i_avg = 140[mA/cm^2]
  c_fix = 0[M]
  SOC = 0.15
  c_pos_total = 1200[mol/m^3]
  c_neg_total = 1400[mol/m^3]
  DCr2_men = DCr2*0.00005
  DCr3_men = DCr3*0.00005
  DFe2_men = DFe2*0.00005
  DFe3_men = DFe3*0.00005
  DH_men = DH
  DCl_men = DCl

Variables
  var1 "负极变量" on selection geom1_r1_dom
    aCr3 = max(cCr3/1[mol/l],eps)  // Cr(3+) 活性
    aCr2 = max(cCr2/1[mol/l],eps)  // Cr(2+) 活性
    aH = max(cH_neg/1[mol/l],eps)  // H(+) 活性
    aCl = max(cCl_neg/1[mol/l],eps)  // Cl(2-) 活性
    phil = phil_neg  // 电解质电位（用于后处理）
    phis = phis_neg  // 电极电位（用于后处理）
    Hx = tcd.tflux_cH_negx  // H(+) 通量（用于后处理）
    Clx = tcd.tflux_cCl_negx  // Cl(2-) 通量（用于后处理）
    i0ref_neg = F_const*k_neg*(cCr2*cCr3)^0.5  // 参考交换电流密度，负极反应
    k_neg = k_neg0*exp(1*F_const*E0_neg/R_const*(1/T_ref-1/T))
    km = 1.6e-4*uu^0.4
    uu = max(v/1[m/s],eps)
    T_ref = 298.15[K]
    cCr2s = (B1*cCr3+(1+B1)*cCr2)/(1+A1+B1)
    cCr3s = (A1*cCr2+(1+A1)*cCr3)/(1+A1+B1)
    aCr2s = max(cCr2s/1[mol/l],eps)
    aCr3s = max(cCr3s/1[mol/l],eps)
    e = tcd.Ect-tcd.Eeq_per1
    A1 = (k_neg/km)*(cCr3*cCr2)^0.5*exp(0.5*F_const*e/(R_const*T))
    B1 = (k_neg/km)*(cCr2*cCr3)^0.5*exp(-0.5*F_const*e/(R_const*T))
  var2 "膜变量" on selection geom1_r2_dom
    phil = phil_mem  // 电解质电位（用于后处理）
    aH = max(cH_mem/1[mol/l],eps)  // H(+) 活性
    aCl = max(cCl_mem/1[mol/l],eps)  // Cl(-) 活性
    aCr2 = max(cCr2_mem/1[mol/l],eps)  // Cr(2+) 活性
    aCr3 = max(cCr3_mem/1[mol/l],eps)  // Cr(3+) 活性
    aFe2 = max(cFe2_mem/1[mol/l],eps)  // Fe(2+) 活性
    aFe3 = max(cFe3_mem/1[mol/l],eps)  // Fe(3+) 活性
    Hx = tcd2.tflux_cH_memx  // H(+) 通量（用于后处理）
    Clx = tcd2.tflux_cCl_memx  // Cl(-) 通量（用于后处理）
  var3 "正极变量" on selection geom1_r3_dom
    aFe2 = max(cFe2/1[mol/l],eps)
    aFe3 = max(cFe3/1[mol/l],eps)
    aH = max(cH_pos/1[mol/l],eps)
    aCl = max(cCl_pos/1[mol/l],eps)
    phil = phil_pos
    phis = phis_pos
    Hx = tcd3.tflux_cH_posx
    Clx = tcd3.tflux_cCl_posx
    i0ref_pos = F_const*k_pos*(cFe2*cFe3)^0.5
    cFe2s = (B2*cFe3+(1+B2)*cFe2)/(1+A2+B2)
    cFe3s = (A2*cFe2+(1+A2)*cFe3)/(1+A2+B2)
    Eeq_pos = E0_pos-9e-4[V/K]*(T-T_ref)
    aFe2s = max(cFe2s/1[mol/l],eps)
    aFe3s = max(cFe3s/1[mol/l],eps)
    e = tcd3.Ect-tcd3.Eeq_per1
    A2 = (k_pos/km)*(cFe2*cFe3)^0.5*exp(0.5*F_const*e/(R_const*T))
    B2 = (k_pos/km)*(cFe2*cFe3)^0.5*exp(-0.5*F_const*e/(R_const*T))
    km = 1.6e-4*uu^0.4
    uu = max(v/1[m/s],eps)
    k_pos = k_pos0*exp(1*F_const*Eeq_pos/R_const*(1/T_ref-1/T))
    T_ref = 298.15[K]

Geometry
  geom1 "几何 1" (2D, length unit m)
    r1: Rectangle "负极" | size = {L_e, H_cell}
    r2: Rectangle "膜" | pos = {L_e, 0}; size = {L_m, H_cell}
    r3: Rectangle "正极" | pos = {L_e+L_m, 0}; size = {L_e, H_cell}
    fin: Finalize "形成联合体"

Physics
  tcd: TertiaryCurrentDistributionNernstPlanck "三次电流分布，能斯特-普朗克（负极）" on selection geom1_r1_dom
    dependent variable cCl_neg = {cCl_neg, cH_neg, cCr2, cCr3}
    dependent variable phil_neg
    dependent variable phis_neg
    dz.dz = wCell
    sp1: SpeciesProperties "物质电荷 1" (default) | z = {-1, 1, 2, 3}
    ice1: Electrolyte "电解质 1" (default)
    nflx1: NoFlux "无通量 1" (default)
    ein1: ElectricInsulation "绝缘 1" (default)
    init1: init "初始值 1" (default) | initc = {cCl_0_neg, cH_0_neg, cCr2_0, cCr3_0}
    pce1: PorousElectrode "多孔电极 1" on selection geom1_r1_dom
      u = {0, v, 0}
      D_cH_neg = DH
      sigma_mat = userdef
      sigma = sigma_e
      epsl = epsilon
      ElectricCorrModel = NoCorr
      D_cSO4_neg = DSO4
      D_cHSO4_neg = DCl
      D_cV2 = DCr2
      D_cV3 = DCr3
      per1: PorousElectrodeReaction "多孔电极反应 1" (default)
        Vi0 = {0, 0, 1, -1}
        Eeq_ref = E0_neg
        ElectrolyteSpecies = {cCl_neg, cH_neg, cCr2, cCr3}
        i0_ref = i0ref_neg
        alphaa = alpha_neg
        Av = a
    egnd1: ElectricGround "电接地 1" on boundaries 1
    in1: Inflow "流入 1" on boundaries 2
      c0 = {cHSO4_0_neg, cH_0_neg, cCr2_0, cCr3_0}
      BoundaryConditionType = FluxDanckwerts
    out1: Outflow "流出 1" on boundaries 3
    iemb1: IonExchangeMembraneBoundary "离子交换膜边界 1" on boundaries 4
      IEMTransportModel = MultipleIons
      phim_src = root.comp1.phil_mem
      species = {1, 1, 1, 1}
      cmem = {cCl_mem, cH_mem, cCr2_mem, cCr3_mem}
    ecd1: ElectrodeNormalCurrentDensity "电极电流密度 1" on boundaries 4 | nis = -tcd2.itot
  tcd2: TertiaryCurrentDistributionNernstPlanck "三次电流分布，能斯特-普朗克（离子交换膜）" on selection geom1_r2_dom
    dependent variable cCl_mem = {cCl_mem, cH_mem, cCr2_mem, cCr3_mem, cFe2_mem, cFe3_mem}
    dependent variable phil_mem
    dependent variable phis_mem
    dz.dz = wCell
    sp1: SpeciesProperties "物质电荷 1" (default) | z = {-1, 1, 2, 3, 2, 1}
    ice1: Electrolyte "电解质 1" (default)
      D_cH_mem = DH_men
      D_cCr2_mem = DCr2_men
      D_cCr3_mem = DCr3_men
      D_cFe2_mem = DFe2_men
      D_cFe3_mem = DFe3_men
      D_cCl_mem = DCl_men
    nflx1: NoFlux "无通量 1" (default)
    ein1: ElectricInsulation "绝缘 1" (default)
    init1: init "初始值 1" (default)
      initc = {(cCl_0_pos+cCl_0_neg)/2, (cH_0_pos+cH_0_neg)/2, cCr2_0/2, cCr3_0/2, cFe2_0/2, cFe3_0/2}
      initphil = -E0_neg
    iem1: IonExchangeMembrane "离子交换膜 1" on selection geom1_r2_dom
      rhofix = c_fix*F_const
      D_cH_mem = DH
      epsl = 0.1
      D_cSO4_mem = DSO4
      D_cHSO4_mem = DCl
      D_cV2_mem = DCr2
      D_cV3_mem = DCr3
      D_cV4_mem = DFe2
      D_cV5_mem = DFe3
    es1: ElectrodeSurface "电极表面 1" on boundaries 4
      er1: ElectrodeReaction "电极反应 1" (default)
        Vi0 = {0, 0, 0, 0, 1, -1}
        Eeq_mat = userdef
        Eeq = 0
        ElectrodeKinetics = FastIrreversibleElectrodeReaction
        RateLimitingSpeciesConcentration = 6
    es2: ElectrodeSurface "电极表面 2" on boundaries 7
      er1: ElectrodeReaction "电极反应 1" (default)
        Vi0 = {0, 0, 1, -1, 0, 0}
        Eeq_mat = userdef
        Eeq = 0
        ElectrodeKinetics = FastIrreversibleElectrodeReaction
        RateLimitingSpeciesConcentration = 4
  tcd3: TertiaryCurrentDistributionNernstPlanck "三次电流分布，能斯特-普朗克（正极）" on selection geom1_r3_dom
    dependent variable cCl_pos = {cCl_pos, cH_pos, cFe2, cFe3}
    dependent variable phil_pos
    dependent variable phis_pos
    dz.dz = wCell
    sp1: SpeciesProperties "物质电荷 1" (default) | z = {-1, 1, 2, 3}
    ice1: Electrolyte "电解质 1" (default)
    nflx1: NoFlux "无通量 1" (default)
    ein1: ElectricInsulation "绝缘 1" (default)
    init1: init "初始值 1" (default) | initc = {cCl_0_pos, cH_0_pos, cFe2_0, cFe3_0}
    pce1: PorousElectrode "多孔电极 1" on selection geom1_r3_dom
      u = {0, v, 0}
      D_cH_pos = DH
      sigma_mat = userdef
      sigma = sigma_e
      epsl = epsilon
      ElectricCorrModel = NoCorr
      D_cSO4_pos = DSO4
      D_cHSO4_pos = DCl
      D_cV4 = DFe2
      D_cV5 = DFe3
      per1: PorousElectrodeReaction "多孔电极反应 1" (default)
        Vi0 = {0, 0, 1, -1}
        Eeq_ref = E0_pos
        ElectrolyteSpecies = {cCl_pos, cH_pos, cFe2, cFe3}
        i0_ref = i0ref_pos
        alphaa = alpha_pos
        Av = a
    ec1: ElectrodeCurrent "电极电流 1" on boundaries 10 | ElectronicCurrentType = AverageCurrentDensity; Ias = i_avg
    in1: Inflow "流入 1" on boundaries 8
      c0 = {cHSO4_0_pos, cH_0_pos, cFe2_0, cFe3_0}
      BoundaryConditionType = FluxDanckwerts
    out1: Outflow "流出 1" on boundaries 9
    iemb1: IonExchangeMembraneBoundary "离子交换膜边界 1" on boundaries 7
      IEMTransportModel = MultipleIons
      phim_src = root.comp1.phil_mem
      species = {1, 1, 1, 1}
      cmem = {cCl_mem, cH_mem, cFe2_mem, cFe3_mem}
    ecd1: ElectrodeNormalCurrentDensity "电极电流密度 1" on boundaries 7 | nis = -tcd2.itot

Mesh
  mesh1 "网格 1"
    size: MeshSizeDefault "大小" | hmax = 0.00235; hmin = 1.05E-5; hcurve = 0.3; hgrad = 1.3
    map1: Map "映射 1" on remaining entities
      dis1: Distribution "分布 1" on boundaries 5, 6 | type = predefined; elemcount = 20; elemratio = 2; symmetric = on
      dis2: Distribution "分布 2" on boundaries 2, 3 | type = predefined; elemcount = 40; elemratio = 20
      dis3: Distribution "分布 3" on boundaries 8, 9 | type = predefined; reverse = on; elemcount = 40; elemratio = 20
      dis4: Distribution "分布 4" on boundaries 1, 4, 7, 10 | type = predefined; elemcount = 40; elemratio = 20
    bl1: BndLayer "边界层 1" on entire geometry
      blp: BndLayerProp "边界层属性" on boundaries 2, 8

Studies
  std1 "研究 1"
    cdi: CurrentDistributionInitialization "电流分布初始化"
    cdi1: CurrentDistributionInitialization "电流分布初始化 1" | initType = secondary
    stat: Stationary "稳态" | useparam = on; pname = c_fix; plistarr = 0 -cHm; punit = mol/m^3
    stat2: Stationary "稳态 2"
      useparam = on
      sweeptype = filled
      pname = {i_avg, SOC}
      plistarr = {140[mA/cm^2], 0.5}
      punit = {A/m^2, }
    stat3: Stationary "稳态 3"
      useparam = on
      sweeptype = filled
      pname = {i_avg, SOC}
      plistarr = {-140[mA/cm^2], 0.5}
      punit = {A/m^2, }

Solver configurations
  sol1 "解 1" (study std1)
    v1: Variables "因变量 1"
      comp1_phil_mem: Field "电解质电位 (comp1.phil_mem)" | scalemethod = manual; scaleval = 1
      comp1_phil_neg: Field "电解质电位 (comp1.phil_neg)" | scalemethod = manual; scaleval = 1
      comp1_phil_pos: Field "电解质电位 (comp1.phil_pos)" | scalemethod = manual; scaleval = 1
      comp1_phis_neg: Field "电势 (comp1.phis_neg)" | scalemethod = manual; scaleval = 1
      comp1_phis_pos: Field "电势 (comp1.phis_pos)" | scalemethod = manual; scaleval = 1
      comp1_tcd3_ec1_phis0: State "边界电位 (comp1.tcd3.ec1.phis0)" | scalemethod = manual; scaleval = 1
    s1: Stationary "稳态求解器 1" | stol = 1.0E-4
      fc1: FullyCoupled "全耦合 1" | linsolver = d1; minstep = 1.0E-6; maxiter = 50
      d1: Direct "直接 (tcd) (已合并)" | linsolver = pardiso
    su1: StoreSolution "解存储 1"
    v2: Variables "因变量 2" | initmethod = sol; notsolmethod = sol
      comp1_phil_mem: Field "电解质电位 (comp1.phil_mem)" | scalemethod = manual; scaleval = 1
      comp1_phil_neg: Field "电解质电位 (comp1.phil_neg)" | scalemethod = manual; scaleval = 1
      comp1_phil_pos: Field "电解质电位 (comp1.phil_pos)" | scalemethod = manual; scaleval = 1
      comp1_phis_neg: Field "电势 (comp1.phis_neg)" | scalemethod = manual; scaleval = 1
      comp1_phis_pos: Field "电势 (comp1.phis_pos)" | scalemethod = manual; scaleval = 1
      comp1_tcd3_ec1_phis0: State "边界电位 (comp1.tcd3.ec1.phis0)" | scalemethod = manual; scaleval = 1
    s2: Stationary "稳态求解器 2" | stol = 1.0E-4
      fc1: FullyCoupled "全耦合 1" | linsolver = d1; minstep = 1.0E-6; maxiter = 50
      d1: Direct "直接 (tcd) (已合并)" | linsolver = pardiso
    su2: StoreSolution "解存储 2"
    v3: Variables "因变量 3" | initmethod = sol; notsolmethod = sol
      comp1_phil_mem: Field "电解质电位 (comp1.phil_mem)" | scalemethod = manual; scaleval = 1
      comp1_phil_neg: Field "电解质电位 (comp1.phil_neg)" | scalemethod = manual; scaleval = 1
      comp1_phil_pos: Field "电解质电位 (comp1.phil_pos)" | scalemethod = manual; scaleval = 1
      comp1_phis_neg: Field "电势 (comp1.phis_neg)" | scalemethod = manual; scaleval = 1
      comp1_phis_pos: Field "电势 (comp1.phis_pos)" | scalemethod = manual; scaleval = 1
      comp1_tcd3_ec1_phis0: State "边界电位 (comp1.tcd3.ec1.phis0)" | scalemethod = manual; scaleval = 1
    s3: Stationary "稳态求解器 3" | stol = 1.0E-4
      p1: Parametric "参数化 1" | porder = constant
      fc1: FullyCoupled "全耦合 1" | linsolver = d1; minstep = 1.0E-6; maxiter = 50
      d1: Direct "直接 (tcd) (已合并)" | linsolver = pardiso
    su3: StoreSolution "解存储 3"
    v4: Variables "因变量 4" | initmethod = sol; notsolmethod = sol
      comp1_phil_mem: Field "电解质电位 (comp1.phil_mem)" | scalemethod = manual; scaleval = 1
      comp1_phil_neg: Field "电解质电位 (comp1.phil_neg)" | scalemethod = manual; scaleval = 1
      comp1_phil_pos: Field "电解质电位 (comp1.phil_pos)" | scalemethod = manual; scaleval = 1
      comp1_phis_neg: Field "电势 (comp1.phis_neg)" | scalemethod = manual; scaleval = 1
      comp1_phis_pos: Field "电势 (comp1.phis_pos)" | scalemethod = manual; scaleval = 1
      comp1_tcd3_ec1_phis0: State "边界电位 (comp1.tcd3.ec1.phis0)" | scalemethod = manual; scaleval = 1
    s4: Stationary "稳态求解器 4" | stol = 1.0E-4
      p1: Parametric "参数化 1" | porder = constant
      fc1: FullyCoupled "全耦合 1" | linsolver = d1; minstep = 1.0E-6; maxiter = 50
      d1: Direct "直接 (tcd) (已合并)" | linsolver = pardiso
    su4: StoreSolution "解存储 4"
    v5: Variables "因变量 5" | initmethod = sol; notsolmethod = sol
      comp1_phil_mem: Field "电解质电位 (comp1.phil_mem)" | scalemethod = manual; scaleval = 1
      comp1_phil_neg: Field "电解质电位 (comp1.phil_neg)" | scalemethod = manual; scaleval = 1
      comp1_phil_pos: Field "电解质电位 (comp1.phil_pos)" | scalemethod = manual; scaleval = 1
      comp1_phis_neg: Field "电势 (comp1.phis_neg)" | scalemethod = manual; scaleval = 1
      comp1_phis_pos: Field "电势 (comp1.phis_pos)" | scalemethod = manual; scaleval = 1
      comp1_tcd3_ec1_phis0: State "边界电位 (comp1.tcd3.ec1.phis0)" | scalemethod = manual; scaleval = 1
    s5: Stationary "稳态求解器 5" | stol = 1.0E-4
      p1: Parametric "参数化 1" | porder = constant
      fc1: FullyCoupled "全耦合 1" | linsolver = d1; minstep = 1.0E-6; maxiter = 50
      d1: Direct "直接 (tcd) (已合并)" | linsolver = pardiso
  sol4 "解存储 3" (study std1)
  sol3 "解存储 2" (study std1)
  sol5 "解存储 4" (study std1)
  sol2 "解存储 1" (study std1)

Datasets
  dset1: Solution | solution = sol1
  dset2: Solution | solution = sol2
  dset3: Solution | solution = sol3
  dset4: Solution | solution = sol4
  dset5: Solution | solution = sol5

Derived values
  av1: AvLine "线平均值 1" on boundaries 10 | data = dset1; table = tbl8; expr = phis_pos; unit = V; descr = 电势

Tables
  tbl1: Table "表格 1"
    // 线平均值 1
    i_avg (A/m^2) | SOC | 电势 (V) | 电势 (V) | 电势 (V) | 电势 (V) | 电势 (V) | 电势 (V) | 电势 (V) | 电势 (V) | 电势 (V) | 电势 (V)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
    -1400 | 0.95 | 1.24918 | 1.27649 | 1.24918 | 1.17018 | 1.17018 | 1.17018 | 1.19749 | 1.17578 | 1.18885 | 1.23897
    -1400 | 0.9 | 1.22422 | 1.29853 | 1.22422 | 1.14522 | 1.14522 | 1.14522 | 1.21953 | 1.20051 | 1.16125 | 1.21084
    -1400 | 0.8 | 1.18975 | 1.33036 | 1.18975 | 1.11075 | 1.11075 | 1.11075 | 1.25136 | 1.23462 | 1.12473 | 1.17371
    -1400 | 0.7 | 1.1628 | 1.3559 | 1.1628 | 1.0838 | 1.0838 | 1.0838 | 1.2769 | 1.2612 | 1.09695 | 1.14561
    -1400 | 0.6 | 1.13834 | 1.37927 | 1.13834 | 1.05934 | 1.05934 | 1.05934 | 1.30027 | 1.28514 | 1.07214 | 1.12065
    -1400 | 0.5 | 1.114 | 1.40255 | 1.114 | 1.035 | 1.035 | 1.035 | 1.32355 | 1.30869 | 1.04776 | 1.09627
    -1400 | 0.4 | 1.08777 | 1.4275 | 1.08777 | 1.00877 | 1.00877 | 1.00877 | 1.3485 | 1.33367 | 1.0218 | 1.07044
    -1400 | 0.3 | 1.05687 | 1.45656 | 1.05687 | 0.977866 | 0.977866 | 0.977866 | 1.37756 | 1.36245 | 0.99159 | 1.04056
    -1400 | 0.2 | 1.0153 | 1.49487 | 1.0153 | 0.936303 | 0.936303 | 0.936303 | 1.41587 | 1.39986 | 0.951649 | 1.00122
    -1400 | 0.1 | 0.941279 | 1.56052 | 0.941279 | 0.862279 | 0.862279 | 0.862279 | 1.48152 | 1.46226 | 0.882675 | 0.933499
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  tbl2: Table "表格 2"
    // 线平均值 1
    i_avg (A/m^2) | SOC | 电势 (V) | 电势 (V) | 电势 (V) | 电势 (V)
    -1400 | 0.95 | 1.19726 | 1.16639 | 1.15871 | 1.20425
    -1400 | 0.9 | 1.17558 | 1.18529 | 1.17928 | 1.18119
    -1400 | 0.8 | 1.14406 | 1.21407 | 1.20938 | 1.14864
    -1400 | 0.7 | 1.1183 | 1.23813 | 1.23402 | 1.12247
    -1400 | 0.6 | 1.09424 | 1.26075 | 1.25691 | 1.09826
    -1400 | 0.5 | 1.06977 | 1.28368 | 1.27995 | 1.0738
    -1400 | 0.4 | 1.04294 | 1.30859 | 1.30485 | 1.04713
    -1400 | 0.3 | 1.01085 | 1.33793 | 1.33404 | 1.0154
    -1400 | 0.2 | 0.967163 | 1.37688 | 1.3726 | 0.972493
    -1400 | 0.1 | 0.889528 | 1.44336 | 1.43801 | 0.896943
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  tbl3: Table "表格 3"
    // 线平均值 1
    i_avg (A/m^2) | SOC | 电势 (V)
    -1400 | 0.95 | 1.20425
    -1400 | 0.9 | 1.18119
    -1400 | 0.8 | 1.14864
    -1400 | 0.7 | 1.12247
    -1400 | 0.6 | 1.09826
    -1400 | 0.5 | 1.0738
    -1400 | 0.4 | 1.04713
    -1400 | 0.3 | 1.0154
    -1400 | 0.2 | 0.972493
    -1400 | 0.1 | 0.896943
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  tbl4: Table "表格 4"
    // 线平均值 1
    i_avg (A/m^2) | SOC | 电势 (V) | 电势 (V)
    1400 | 0.05 | 1.15871 | 1.20425
    1400 | 0.1 | 1.17928 | 1.18119
    1400 | 0.2 | 1.20938 | 1.14864
    1400 | 0.3 | 1.23402 | 1.12247
    1400 | 0.4 | 1.25691 | 1.09826
    1400 | 0.5 | 1.27995 | 1.0738
    1400 | 0.6 | 1.30485 | 1.04713
    1400 | 0.7 | 1.33404 | 1.0154
    1400 | 0.8 | 1.3726 | 0.972493
    1400 | 0.9 | 1.43801 | 0.896943
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  tbl5: Table "表格 5"
    // 线平均值 1
    i_avg (A/m^2) | SOC | 电势 (V) | 电势 (V)
    -1400 | 0.95 | 1.20425 | 1.15871
    -1400 | 0.9 | 1.18119 | 1.17928
    -1400 | 0.8 | 1.14864 | 1.20938
    -1400 | 0.7 | 1.12247 | 1.23402
    -1400 | 0.6 | 1.09826 | 1.25691
    -1400 | 0.5 | 1.0738 | 1.27995
    -1400 | 0.4 | 1.04713 | 1.30485
    -1400 | 0.3 | 1.0154 | 1.33404
    -1400 | 0.2 | 0.972493 | 1.3726
    -1400 | 0.1 | 0.896943 | 1.43801
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  tbl6: Table "表格 6"
    // 线平均值 1
    i_avg (A/m^2) | SOC | 电势 (V) | 电势 (V) | 电势 (V) | 电势 (V) | 电势 (V) | 电势 (V) | 电势 (V) | 电势 (V)
    1400 | 0.05 | 1.15871 | 1.20425 | 1.20425 | 0 | 1.20425 | 1.15871 | 1.12503 | 1.23933
    1400 | 0.1 | 1.17928 | 1.18119 | 1.18119 | 0 | 1.18119 | 1.17928 | 1.15074 | 1.21108
    1400 | 0.2 | 1.20938 | 1.14864 | 1.14864 | 0 | 1.14864 | 1.20938 | 1.18572 | 1.17392
    1400 | 0.3 | 1.23402 | 1.12247 | 1.12247 | 0 | 1.12247 | 1.23402 | 1.21269 | 1.14582
    1400 | 0.4 | 1.25691 | 1.09826 | 1.09826 | 0 | 1.09826 | 1.25691 | 1.23679 | 1.12086
    1400 | 0.5 | 1.27995 | 1.0738 | 1.0738 | 0 | 1.0738 | 1.27995 | 1.26035 | 1.09647
    1400 | 0.6 | 1.30485 | 1.04713 | 1.04713 | 0 | 1.04713 | 1.30485 | 1.28519 | 1.07064
    1400 | 0.7 | 1.33404 | 1.0154 | 1.0154 | 0 | 1.0154 | 1.33404 | 1.31367 | 1.04074
    1400 | 0.8 | 1.3726 | 0.972493 | 0.972493 | 0 | 0.972493 | 1.3726 | 1.35049 | 1.00142
    1400 | 0.9 | 1.43801 | 0.896943 | 0.896943 | 0 | 0.896943 | 1.43801 | 1.41158 | 0.933854
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  tbl7: Table "表格 7"
    // 线平均值 1
    i_avg (A/m^2) | SOC | 电势 (V) | 电势 (V) | 电势 (V) | 电势 (V)
    -1400 | 0.95 | 1.23884 | 1.12217 | 1.20311 | 1.14496
    -1400 | 0.9 | 1.21968 | 1.1402 | 1.20881 | 1.14123
    -1400 | 0.8 | 1.18709 | 1.17149 | 1.22513 | 1.12644
    -1400 | 0.7 | 1.16025 | 1.19789 | 1.24366 | 1.10808
    -1400 | 0.6 | 1.13588 | 1.22208 | 1.26384 | 1.08736
    -1400 | 0.5 | 1.11187 | 1.24593 | 1.28624 | 1.06378
    -1400 | 0.4 | 1.08631 | 1.2712 | 1.31224 | 1.0357
    -1400 | 0.3 | 1.05645 | 1.30034 | 1.34465 | 0.999625
    -1400 | 0.2 | 1.01622 | 1.33864 | 1.39024 | 0.947331
    -1400 | 0.1 | 0.941996 | 1.40518 | 1.47257 | 0.8507
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  tbl8: Table "表格 8"
    // 线平均值 1
    i_avg (A/m^2) | SOC | 电势 (V)
    -1400 | 0.5 | 1.14914